Vmax := 85 V*sqrt(2) = 120.208 V
Vth := 58 V
f := 50 Hz
time := 0 s, 0.001 s .. 0.02 s
Vth(time) := Vmax*sin(2*π*f*time)
# [plot: Vth(time) vs time (s)]
(0.008 s - 0.002 s)/(0.02 s) = 0.3
N := 150
n := N*0.3 = 45
