uF := μF
uH := μH
V_OUT := 3.3 V
V_IN_min := 2 V
V_IN_max := 5.5 V
I_OUT := 400 mA
T_A := 55 °C
I_IN := V_OUT*I_OUT/V_IN_min = 0.66 A
# Параметры DA1
F_SW_min := 1250 kHz
F_SW_max := 1500 kHz
T_J_max := 125 °C
R_θJA := 48.7 Δ°C/W
# Feedback
# Напряжение на ножке FB
V_FB := 0.5 V
# Резистор верхнего плеча
R4 := 1 MΩ
P_R4_max := 63 mW
# Резистор нижнего плеча
R5 := R4/(V_OUT/V_FB - 1) = 178571 Ω
R5 := 178 kΩ
P_R5_max := 63 mW
I_R4R5 := V_OUT/(R4 + R5) = 2.80136e-6 A
P_R4 := I_R4R5^2*R4 = 7.84761e-6 W
(1 - P_R4/P_R4_max)*100 = 99.9875
P_R5 := I_R4R5^2*R5 = 1.39687e-6 W
(1 - P_R5/P_R5_max)*100 = 99.9978
# Inductor
# Минимальный номинал катушки для понижающего режима
L_min_1 := V_OUT*(V_IN_max - V_OUT)/(V_IN_max*F_SW_min*0.3 A) = 3.52e-6 H
# Минимальный номинал катушки для повышающего режима
L_min_2 := V_IN_min*(V_OUT - V_IN_min)/(V_OUT*F_SW_min*0.3 A) = 2.10101e-6 H
L2 := 3.5*uH
I_L2_max := 2.1 A
(1 - I_OUT/I_L2_max)*100 = 80.9524
# Input capacitor
# Минимальный рекомендованный номинал
C7 > 4.7*uF
# Выбранный конденсатор
C7 := 10*uF
V_C7_max := 10 V
# Ёмкость конденсатора при максимальном входном напряжении
C7_min := C7*(0.7 - 0.1) = 6e-6 F
# Запас по напряжению
(1 - V_IN_max/V_C7_max)*100 = 45
# Output Capacitor
# Минимальный рекомендованный номинал
C8 := 5*L2*uF/uH = 1.75e-5 F
C8 := 22*uF
V_C8_max := 16 V
(1 - V_OUT/V_C8_max)*100 = 79.375
# Расчет потерь
# Максимальная мощность рассеяния DA1
P_DA1_max := (T_J_max - T_A)/R_θJA = 1.43737 W
# Разъём X3
# Максимальный ток разъёма X8
I_X8_max := 8 A
(1 - I_IN/I_X8_max)*100 = 91.75
# Аккумулятор
Cap := 1750 mA*hr
I_active := 200 mA
I_lora_sleep := 1.69 μA
I_GPS_sleep := 105 μA
# Саморазряд аккумулятора составляет 5% в месяц. Ёмкость при саморазряде аккумулятора в течение 6 месяцев
Cap := Cap - Cap*6*0.05 = 4410 C
# Предположим длительность активного режима составит 1с
discharge_duration := 1 s
# Зададим период выхода в активный режим
sending_period := 1 hr
# Количество посылок которое можно передать, пока аккумулятор не разрядится
number_of_transactions := Cap/(I_active*discharge_duration + (I_lora_sleep + I_GPS_sleep)*sending_period) = 7550.28
# Количество суток работы
total_discharge_days := number_of_transactions/24 = 314.595
