uF := μF
nH := 10^-3*μH
uH := μH
# GPS
I_VCC_RF := 50 mA
V_CMOS := 3.3 V
# Конденсатор С3
C3 := 10*uF
V_C3_max := 10 V
(1 - V_CMOS/V_C3_max)*100 = 67
# Конденсатор С2
C2 := 100 nF
V_C2_max := 50 V
(1 - V_CMOS/V_C2_max)*100 = 93.4
# Резистор R1
R1 := 10 Ω
P_R1_max := 0.25 W
P_R1 := I_VCC_RF^2*R1 = 0.025 W
(1 - P_R1/P_R1_max)*100 = 90
# Катушка L1
L1 := 27*nH
I_L1_DC := 0.28 A
(1 - I_VCC_RF/I_L1_DC)*100 = 82.1429
# Конденсатор C1
C1 := 10 nF
V_C1_max := 50 V
(1 - V_CMOS/V_C1_max)*100 = 93.4
